*Heading
** Job name: PlaneStrain Model name: Model-Slow
** Generated by: Abaqus/CAE 2020
*Preprint, echo=NO, model=NO, history=NO, contact=NO
**
** PARTS
**
*Part, name=Granite
*Node
      1,          10.,           0.
      2,           0.,          10.
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*Element, type=CPE4
  1,  36,  37,  74,  73
  2,  37,  38,  75,  74
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*Element, type=CPE3
609,  35,  36,  73
610,  35,  73,  92
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*Nset, nset=Body, generate
    1,  8857,     1
*Elset, elset=Body, generate
     1,  16734,      1
** Section: Section-1
*Solid Section, elset=Body, material=Granite
,
*End Part
**
**
** ASSEMBLY
**
*Assembly, name=Assembly
**
*Instance, name=Granite-1, part=Granite
*End Instance
**
*Nset, nset=Bottom, instance=Granite-1
   1,  35,  36,  37,  38,  39
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*Elset, elset=Bottom, instance=Granite-1
   1,   2,   3,   4,   5,   6
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*Nset, nset=Left, instance=Granite-1
   2,  34,  35,  55,  56,  57
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*Elset, elset=Left, instance=Granite-1
   590,   591,   592,   593,   594,   595
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*Nset, nset=Right, instance=Granite-1
 731, 732, 882, 883, 884, 885
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*Elset, elset=Right, instance=Granite-1
  813,  923,  925,  927,  929,  931
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*Elset, elset=_Right_S2, internal, instance=Granite-1
 813, 923
*Elset, elset=_Right_S1, internal, instance=Granite-1, generate
  925,  1109,     2
*Surface, type=ELEMENT, name=Right
_Right_S2, S2
_Right_S1, S1
*End Assembly
*Amplitude, name=Amp-1, definition=SMOOTH STEP
             0.,              0.,              1.,              1.
**
** MATERIALS
**
*Material, name=Granite
*Depvar
     85,
*User Material, constants=7
60700., 31300., 76700., 41600., 13800.,  5300., 0.7854
**
** BOUNDARY CONDITIONS
**
** Name: AllBottom Type: Displacement/Rotation
*Boundary
Bottom, 2, 2
** Name: LeftSym Type: Symmetry/Antisymmetry/Encastre
*Boundary
Left, XSYMM
** ----------------------------------------------------------------
**
** STEP: Loading
**
*Step, name=Loading, nlgeom=NO
*Static
1., 1., 1e-05, 1.
**
** LOADS
**
** Name: Body   Type: Body force
*Dload
Granite-1.Body, BY, -0.0196
** Name: Lateral   Type: Pressure
*Dsload
Right, HP, 0.882, 90., 0.
**
** OUTPUT REQUESTS
**
*Restart, write, frequency=0
**
** FIELD OUTPUT: F-Output-1
**
*Output, field, variable=PRESELECT
**
** HISTORY OUTPUT: H-Output-1
**
*Output, history, variable=PRESELECT
*End Step
